/post1
nsel,s,loc,z,a,10
nsel,r,loc,x,31.5,90.5
nsort,s,eqv,0,0,all
*get,min_eqv,sort,0,imin
*get,jnode,node,min_eqv,s,eqv

*if,jnode,lt,45,then,
	/post1
	nsel,s,loc,z,a,-10
	nsel,r,loc,x,31.5,86.5
	nsel,r,s,eqv,0,45
	esln,s,0
	/prep7
	edele,all
	ndele,all
	esel,all
	eplot

	/post1
	nsel,s,loc,z,b,10
	nsel,r,loc,x,31.5,90.5
	nsel,r,s,eqv,0,45
	esln,s,0
	/prep7
	edele,all
	ndele,all
	esel,all
	eplot
*endif
